M := transpose([
    10.6, 10.9, 15.2, 17.3, 18.2, 16.1, 13.2, 17.1, 22.3, 21.4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])
# [plot: i vs Mi]
n := length(M)
x := sort(M)
R := max(x) - min(x) = 13.1
k := floor(sqrt(n)) = 7
d := R/k = 1.87143
